<?xml version="1.0"?>
<Node 	name="Root" gravity="0 0 1" time="0" animate="0"  dt="0.02" >
    <RequiredPlugin name="SofaOpenglVisual"/>
    <RequiredPlugin pluginName="Flexible"/>
    <VisualStyle displayFlags="showVisualModels showBehaviorModels hideMechanicalMappings showForceFields" />

    <Node 	name="GreenLagrange" >
        <EulerImplicitSolver verbose="0"  rayleighStiffness="0.1" rayleighMass="0.1" />
        <CGLinearSolver verbose="0" iterations="25" tolerance="1.0e-9" threshold="1.0e-9" />

        <!--parametrizable mesh-->
        <GridMeshCreator name="loader" filename="nofile" resolution="10 10" trianglePattern="1" rotation="0 0 0 " scale="1 1 0" />
        <MeshTopology name="mesh" src="@loader" />
        <MechanicalObject name="defoDOF" template="Vec3d"  src="@loader" />
        <BarycentricShapeFunction template="ShapeFunction3d"  />

        <!--simple mesh-->
        <!--    <TriangleSetTopologyContainer name="mesh" triangles="0 1 2" />
        <TriangleSetGeometryAlgorithms  drawTriangles="true" drawColorTriangles="0.2 0.2 0.2"/>
        <MechanicalObject name="defoDOF" template="Vec3d"  position="0 0 0  1 0 0  0.1 1 0" />
        <BarycentricShapeFunction template="ShapeFunction3d" position="0 0  1 0  0 1" />-->


        <BoxConstraint box="-0.005 -0.005 -0.005    1.005 0.005 0.005  " />
        <UniformMass  name="mass" totalMass="1"/>


<!--    Just to compute and visualize deformation gradients. Does nothing until we set a strain mapping and a material-->
        <Node name="deformationNode" >
            <TopologyGaussPointSampler name="sampler" inPosition="@../mesh.position" showSamplesScale="0" method="0" order="1" />
            <MechanicalObject template="F321"  name="triangleDeformationsDOF" />
            <LinearMapping template="Vec3d,F321"  />
<!--
            <TriangleSetTopologyContainer triangles="@../mesh.triangles" />
            <TriangleDeformationMapping  scaleView="0.03" />
-->
            <Node name="StrainNode">
                <MechanicalObject template="E321"  name="VoigtStrainDOF" />
                <GreenStrainMapping template="F321,E321" />
                <HookeForceField template="E321" youngModulus="10" poissonRatio="0.4" />
            </Node>
        </Node>

	<Node name="Visual"  >
            <OglModel  />
            <IdentityMapping />
        </Node>

<!--    elastic force, until we set up triangle FEM-->
<!--    <MeshSpringForceField linesStiffness="10"/>-->

    </Node>


<Node 	name="Corotational" >
    <EulerImplicitSolver verbose="0" /> <CGLinearSolver verbose="0" iterations="25" tolerance="1.0e-9" threshold="1.0e-9" />

    <GridMeshCreator name="loader" filename="nofile" resolution="10 10" trianglePattern="1" translation="1.2 0 0" rotation="0 0 0 " scale="1 1 0" />
    <MeshTopology name="mesh" src="@loader" />
    <MechanicalObject name="defoDOF" template="Vec3d"  src="@loader" />
    <BarycentricShapeFunction template="ShapeFunction3d"  />

    <BoxConstraint box="1.195 -0.005 -0.005    2.205 0.005 0.005  " />
    <UniformMass  name="mass" totalMass="1"/>

    <Node name="deformationNode" >
        <TopologyGaussPointSampler name="sampler" inPosition="@../mesh.position" showSamplesScale="0" method="0" order="1" />
        <MechanicalObject template="F321"  name="triangleDeformationsDOF" />
        <LinearMapping template="Vec3d,F321"  />

<!-- 	<TriangleSetTopologyContainer triangles="@../mesh.triangles" /> -->
<!--         <TriangleDeformationMapping  scaleView="0.03" /> -->

        <Node name="StrainNode">
            <MechanicalObject template="E321"  name="VoigtStrainDOF" />
            <CorotationalStrainMapping template="F321,E321"   method="qr"/>
            <HookeForceField template="E321" youngModulus="10" poissonRatio="0.4" />
        </Node>
    </Node>
    <Node name="Visual"  >
        <OglModel  />
        <IdentityMapping />
    </Node>

</Node>


</Node>
