<?xml version="1.0"?>
<Node 	name="Root" gravity="0 0 0" dt="1"  >
    <RequiredPlugin name="SofaOpenglVisual"/>

    <RequiredPlugin pluginName="Flexible" />
    <VisualStyle displayFlags="showBehaviorModels showMechanicalMappings showForceFields" />

    <EulerImplicitSolver  rayleighStiffness="0.1" rayleighMass="0.1" />
    <CGLinearSolver iterations="25" tolerance="1e-5" threshold="1e-5" />

    <MechanicalObject  template="Vec3d" position="0 0 1   0 1 0   1 0 0   -0.7 -0.7 0 "  name="parent"  />
    <UniformMass vertexMass="1" />
    <ShepardShapeFunction position="@parent.rest_position" nbRef="4" power="2"/>

    <Node 	name="Child"   >
	<MeshObjLoader name="MeshLoader" filename="mesh/ball.obj"/>
	<MeshTopology src="@MeshLoader" />
	<MechanicalObject  template="F331" name="F"  showObject="0" showObjectScale="0.05" />
    	<LinearMapping template="Vec3d,F331"  />

	    <Node 	name="Child"   >
		<MechanicalObject  template="E331" name="E"  showObject="1" showObjectScale="0.05" />
	    	<GreenStrainMapping template="F331,E331"  />
	    </Node>

    </Node>

    <Node 	name="visual"   >
	<MeshObjLoader name="meshLoader_0" filename="mesh/ball.obj" handleSeams="1" />
	<OglModel template="Vec3d" name="Visual" src="@meshLoader_0"/>
    	<LinearMapping template="Vec3d,Vec3d"/>
    </Node>
</Node>
