<?xml version="1.0"?>
<Node 	name="Root" gravity="0 0 0" dt="1"  >
    <RequiredPlugin name="SofaOpenglVisual"/>
    <RequiredPlugin pluginName="Flexible"/>
<!--    <MechanicalObject  template="Rigid3d" position="0 -1 0 0 0 0 1    0 0 0 0 0 0 1    0 1 0 0 0 0 1"  name="parent"  /> -->
<!--
    <MechanicalObject  template="Vec3d" position="0 0 1   0 1 0   1 0 0   -1 -1 0 "  name="parent"  />
    <ShepardShapeFunction position="@parent.rest_position" power="2"/>
-->

    <MeshGmshLoader name="loader" filename="mesh/torus_low_res.msh" />
    <MeshTopology src="@loader" />
    <MechanicalObject src="@loader" name="parent" />
    <BarycentricShapeFunction position="@parent.rest_position" />

    <EulerImplicitSolver  rayleighStiffness="0.1" rayleighMass="0.1" />
    <CGLinearSolver iterations="25" tolerance="1e-5" threshold="1e-5"/>
    <UniformMass vertexMass="1" />

    <Node 	name="Child"   >
         <MeshObjLoader name="loader" filename="mesh/torus_for_collision.obj" />
         <MechanicalObject src="@loader" name="child" />
<!--
       <MechanicalObject template="Vec3d" position="0 0.1 0.8   0 0 0.5" name="child"/>
-->
       <LinearMapping template="Vec3d,Vec3d"/>
    </Node>

    <Node 	name="visual"   >
	<MeshObjLoader name="meshLoader_0" filename="mesh/torus.obj" handleSeams="1" />
	<OglModel template="Vec3d" name="Visual" src="@meshLoader_0"/>
    	<LinearMapping template="Vec3d,Vec3d"/>
    </Node>
</Node>
