<?xml version="1.0"?>
<Node 	name="Root" gravity="0 -3 0 " dt="0.03"  >
    <RequiredPlugin name="SofaOpenglVisual"/>
    <RequiredPlugin pluginName="Flexible"/>
    <VisualStyle displayFlags="showBehaviorModels showForceFields" />
    <DefaultAnimationLoop />
    <DefaultVisualManagerLoop />


     <Node name="WITHOUT"   >
	<EulerImplicitSolver />
	<CGLinearSolver iterations="25" tolerance="1e-5" threshold="1e-5"/>
        <MeshGmshLoader name="loader" filename="mesh/torus_low_res.msh" />
	<MeshTopology name="mesh" src="@loader" />
	<MechanicalObject template="Vec3d" name="parent" showObject="false" showObjectScale="0.05" />

        <BoxROI template="Vec3d" box="0 -2 0 5 2 5" position="@mesh.position" name="FixedROI"/>
        <FixedConstraint indices="@FixedROI.indices" />

        <BarycentricShapeFunction  />

        <Node name="behavior"   >
	    <TopologyGaussPointSampler name="sampler" inPosition="@../mesh.position" showSamplesScale="0" method="0" order="1" />
	    <MechanicalObject  template="F331" name="F"  showObject="0" showObjectScale="0.05" />
    	    <LinearMapping template="Vec3d,F331"  />

	    <Node name="Strain"   >
		<MechanicalObject  template="E331" name="E"  />
	    	<CorotationalStrainMapping template="F331,E331"   method="svd" geometricStiffness="false"/>
	        <HookeForceField  template="E331" name="ff" youngModulus="2000.0" poissonRatio="0.4" viscosity="0.1"    />
	    </Node>


        </Node>

	<Node name="mass"   >
	     <MechanicalObject position="@../mesh.position"  />
	     <UniformMass totalMass="250" />
	     <LinearMapping template="Vec3d,Vec3d"  />
        </Node>

	<Node name="collision"  >
	     <MeshObjLoader name="loader" filename="mesh/torus.obj" />
	     <MeshTopology src="@loader"/>
 	     <MechanicalObject  />
             <TriangleCollisionModel />
             <LinearMapping template="Vec3d,Vec3d"/>
	</Node>

	<Node name="Visual"  >
	     <MeshObjLoader name="meshLoader_0" filename="mesh/torus.obj" handleSeams="1" />
	     <OglModel src="@meshLoader_0" color="1 .4 0.5 1" />
             <LinearMapping template="Vec3d,Vec3d"/>
	</Node>
    </Node>


    <Node name="WITH"   >
	<EulerImplicitSolver />
	<CGLinearSolver iterations="25" tolerance="1e-5" threshold="1e-5" />
        <MeshGmshLoader name="loader" filename="mesh/torus_low_res.msh" />
	<MeshTopology name="mesh" src="@loader" />
	<MechanicalObject template="Vec3d" name="parent" showObject="false" showObjectScale="0.05" />

        <BoxROI template="Vec3d" box="0 -2 0 5 2 5" position="@mesh.position" name="FixedROI"/>
        <FixedConstraint indices="@FixedROI.indices" />

        <BarycentricShapeFunction  />

        <Node name="behavior"   >
	    <TopologyGaussPointSampler name="sampler" inPosition="@../mesh.position" showSamplesScale="0" method="0" order="1" />
	    <MechanicalObject  template="F331" name="F"  showObject="0" showObjectScale="0.05" />
    	    <LinearMapping template="Vec3d,F331"  />

	    <Node name="Strain"   >
		<MechanicalObject  template="E331" name="E"  />
	    	<CorotationalStrainMapping template="F331,E331"   method="svd" geometricStiffness="true"/>
	        <HookeForceField  template="E331" name="ff" youngModulus="2000.0" poissonRatio="0.4" viscosity="0.1"    />
	    </Node>


        </Node>

	<Node name="mass"   >
	     <MechanicalObject position="@../mesh.position"  />
	     <UniformMass totalMass="250" />
	     <LinearMapping template="Vec3d,Vec3d"  />
        </Node>

	<Node name="collision"  >
	     <MeshObjLoader name="loader" filename="mesh/torus.obj" />
	     <MeshTopology src="@loader"/>
 	     <MechanicalObject  />
             <TriangleCollisionModel />
             <LinearMapping template="Vec3d,Vec3d"/>
	</Node>

	<Node name="Visual"  >
	     <MeshObjLoader name="meshLoader_1" filename="mesh/torus.obj" handleSeams="1" />
	     <OglModel src="@meshLoader_1" />
             <LinearMapping template="Vec3d,Vec3d"/>
	</Node>
    </Node>


    <Node name="WITHOUT 2D" >
      <EulerImplicitSolver rayleighStiffness="0" rayleighMass="0"/>
      <CGLinearSolver iterations="100" tolerance="1e-10" threshold="1e-10"  />
    <GridMeshCreator name="loader" filename="nofile" resolution="10 10" trianglePattern="1" translation="6 0 0" rotation="90 0 0 " scale="5 5 0" />
    <MeshTopology name="mesh" src="@loader" />
    <MechanicalObject name="defoDOF" template="Vec3d"  src="@loader" />
    <BarycentricShapeFunction template="ShapeFunction3d"  />

    <BoxConstraint box="5.9 -1 -1    6.1 1 6 " />
    <UniformMass  name="mass" totalMass="1"/>

    <Node name="deformationNode" >
 	<TopologyGaussPointSampler name="sampler" inPosition="@../mesh.position" showSamplesScale="0" method="0" order="1" />
        <MechanicalObject template="F321"  name="triangleDeformationsDOF" />
   	<LinearMapping template="Vec3d,F321"  />

        <Node name="StrainNode">
            <MechanicalObject template="E321"  name="VoigtStrainDOF" />
	    <CorotationalStrainMapping template="F321,E321"   method="svd"/>
            <HookeForceField template="E321" youngModulus="2000" poissonRatio="0.2" viscosity="0.1" />
	  </Node>


    </Node>

	<Node name="Visual"  >
	     <OglModel color="1 .4 0.5 1" />
             <IdentityMapping />
	</Node>

</Node>


    <Node name="WITH 2D" >
      <EulerImplicitSolver rayleighStiffness="0" rayleighMass="0"/>
      <CGLinearSolver iterations="100" tolerance="1e-10" threshold="1e-10"  />
    <GridMeshCreator name="loader" filename="nofile" resolution="10 10" trianglePattern="1" translation="6 0 0" rotation="90 0 0 " scale="5 5 0" />
    <MeshTopology name="mesh" src="@loader" />
    <MechanicalObject name="defoDOF" template="Vec3d"  src="@loader" />
    <BarycentricShapeFunction template="ShapeFunction3d"  />

    <BoxConstraint box="5.9 -1 -1    6.1 1 6 " />
    <UniformMass  name="mass" totalMass="1"/>

    <Node name="deformationNode" >
 	<TopologyGaussPointSampler name="sampler" inPosition="@../mesh.position" showSamplesScale="0" method="0" order="1" />
        <MechanicalObject template="F321"  name="triangleDeformationsDOF" />
   	<LinearMapping template="Vec3d,F321"  />

        <Node name="StrainNode">
            <MechanicalObject template="E321"  name="VoigtStrainDOF" />
	    <CorotationalStrainMapping template="F321,E321"   method="svd" geometricStiffness="true"/>
            <HookeForceField template="E321" youngModulus="2000" poissonRatio="0.2" viscosity="0.1" />
	  </Node>


    </Node>

	<Node name="Visual"  >
	     <OglModel/>
             <IdentityMapping />
	</Node>

</Node>


</Node>
