<?xml version="1.0"?>
<Node 	name="Root" gravity="0 -0.5 0 " dt="0.3"  >
    <RequiredPlugin name="SofaOpenglVisual"/>

      <RequiredPlugin pluginName="Flexible"/>

    <VisualStyle displayFlags="showBehaviorModels showForceFields" />
    <DefaultAnimationLoop />
    <DefaultVisualManagerLoop />

<!--     <EulerImplicitSolver  rayleighStiffness="0.1" rayleighMass="0.1" /> <CGLinearSolver  /> -->

     <Node 	name="FEM"   >
    <EulerImplicitSolver />
	<CGLinearSolver iterations="25" tolerance="1e-5" threshold="1e-5"/>
	      <MeshGmshLoader name="loader" filename="mesh/torus_low_res.msh" />
	      <MeshTopology name="mesh" src="@loader" />
	      <MechanicalObject template="Vec3d" name="parent" />

             <BoxROI template="Vec3d" box="0 -2 0 5 2 5" position="@mesh.position" name="FixedROI"/>
             <FixedConstraint indices="@FixedROI.indices" />

	     <UniformMass totalMass="250" />

	     <!--TetrahedralCorotationalFEMForceField name="ff" youngModulus="2000" poissonRatio="0.2" method="polar"/-->
	  <TetrahedronFEMForceField name="ff" youngModulus="2000" poissonRatio="0.2" method="svd"/>

	    <Node 	name="visual"   >
		<MeshObjLoader name="meshLoader_1" filename="mesh/torus.obj" handleSeams="1" />
		<OglModel template="Vec3d" name="Visual" src="@meshLoader_1" color="1 .4 0.5 1"/>
	    	<BarycentricMapping template="Vec3d,Vec3d"/>
	    </Node>
    </Node>

    <Node 	name="Flexible"   >
    <EulerImplicitSolver />
    <CGLinearSolver iterations="25" tolerance="1e-5" threshold="1e-5" />
        <MeshGmshLoader name="loader" filename="mesh/torus_low_res.msh" />
	<MeshTopology name="mesh" src="@loader" />
	<MechanicalObject template="Vec3d" name="parent" showObject="false" showObjectScale="0.05" />

        <BoxROI template="Vec3d" box="0 -2 0 5 2 5" position="@mesh.position" name="FixedROI"/>
        <FixedConstraint indices="@FixedROI.indices" />

        <BarycentricShapeFunction  />

        <Node 	name="behavior"   >
	    <TopologyGaussPointSampler name="sampler" inPosition="@../mesh.position" showSamplesScale="0" method="0" order="1" />
	    <MechanicalObject  template="F331" name="F"  showObject="0" showObjectScale="0.05" />
    	    <LinearMapping template="Vec3d,F331"  />

	    <Node 	name="Strain"   >
		<MechanicalObject  template="E331" name="E"  />
	    	<CorotationalStrainMapping template="F331,E331"   method="svd"/>
	        <HookeForceField  template="E331" name="ff" youngModulus="2000.0" poissonRatio="0.2" viscosity="0"    />
	    </Node>

	    <!--<Node 	name="I"   >
		    <MechanicalObject  template="I331" name="I"  />
		    <InvariantMapping template="F331,I331"   deviatoric="true"/>
		    <VolumePreservationForceField  template="I331" k="1000"/>
		</Node>-->

        </Node>

	<Node 	name="mass"   >
	     <MechanicalObject position="@../mesh.position"  />
	     <UniformMass totalMass="250" />
	     <LinearMapping template="Vec3d,Vec3d"  />
        </Node>

	<Node name="collision"  >
	     <MeshObjLoader name="loader" filename="mesh/torus.obj" />
	     <MeshTopology src="@loader"/>
 	     <MechanicalObject  />
             <TriangleCollisionModel />
             <LinearMapping template="Vec3d,Vec3d"/>
	</Node>

	<Node name="Visual"  >
	     <MeshObjLoader name="meshLoader_2" filename="mesh/torus.obj" handleSeams="1" />
	     <OglModel src="@meshLoader_2" />
             <LinearMapping template="Vec3d,Vec3d"/>
	</Node>
    </Node>


<!--   <Node 	name="FEM_stVenant"   >
    <EulerImplicitSolver /> <CGLinearSolver  />
	    <MeshGmshLoader name="loader" filename="mesh/torus_low_res.msh" translation="0 0 5" />
	    <MeshTopology name="mesh" src="@loader" />
	    <MechanicalObject template="Vec3d" name="parent" />

           <BoxROI template="Vec3d" box="0 -2 5 5 2 10" position="@mesh.position" name="FixedROI"/>
           <FixedConstraint indices="@FixedROI.indices" />

	     <UniformMass totalMass="250" />

	    <StandardTetrahedralFEMForceField name="ff" materialName="StVenantKirchhoff" ParameterSet="833.3333 555.55555" />
	    <MJEDTetrahedralForceField name="ff" materialName="StVenantKirchhoff" ParameterSet="833.3333 555.55555" />

	    <Node 	name="visual"   >
		<MeshObjLoader name="meshLoader_3" filename="mesh/torus.obj" translation="0 0 5" handleSeams="1" />
		<OglModel template="Vec3d" name="Visual" src="@meshLoader_3" color="1 .4 0.5 1"/>
	    	<BarycentricMapping template="Vec3d,Vec3d"/>
	    </Node>
    </Node>-->


    <Node 	name="Flexible_stVenant"   >
    <EulerImplicitSolver />
    <CGLinearSolver iterations="25" tolerance="1e-5" threshold="1e-5" />
	<MeshGmshLoader name="loader" filename="mesh/torus_low_res.msh" translation="0 0 5" />
        <MeshTopology name="mesh" src="@loader" />
	<MechanicalObject template="Vec3d" name="parent" showObject="false" showObjectScale="0.05"/>

        <BoxROI template="Vec3d" box="0 -2 5 5 2 10" position="@mesh.position" name="FixedROI"/>
        <FixedConstraint indices="@FixedROI.indices" />

        <BarycentricShapeFunction  />

        <Node 	name="behavior"   >
	    <TopologyGaussPointSampler name="sampler" inPosition="@../mesh.position" showSamplesScale="0" method="0" order="1" />
	    <MechanicalObject  template="F331" name="F"  showObject="0" showObjectScale="0.05" />
    	    <LinearMapping template="Vec3d,F331"  />

	    <Node 	name="Strain"   >
		<MechanicalObject  template="E331" name="E"  />
	    	<GreenStrainMapping template="F331,E331"     />
	        <HookeForceField  template="E331" name="ff" youngModulus="2000.0" poissonRatio="0.2" viscosity="0"    />
            </Node>
        </Node>

	<Node 	name="mass"   >
	     <MechanicalObject position="@../mesh.position" />
	     <UniformMass totalMass="250" />
	     <LinearMapping template="Vec3d,Vec3d"  />
        </Node>

	<Node name="collision"  >
	     <MeshObjLoader name="loader" filename="mesh/torus.obj" translation="0 0 5"/>
	     <MeshTopology src="@loader"/>
 	     <MechanicalObject  />
             <TriangleCollisionModel />
             <LinearMapping template="Vec3d,Vec3d"/>
	</Node>

	<Node name="Visual"  >
	     <MeshObjLoader name="meshLoader_0" filename="mesh/torus.obj" translation="0 0 5" handleSeams="1" />
	     <OglModel src="@meshLoader_0"/>
             <LinearMapping template="Vec3d,Vec3d"/>
	</Node>
    </Node>


</Node>
